# INITIALIZATION
units           real
dimension       3
boundary        p p p
atom_style      full

timestep	2.0

# force-field terms
pair_style hybrid/overlay lj/cut/tip4p/long 1 2 1 1 0.125 9.5 9 lj/cut 9
kspace_style pppm/tip4p 0.0001
bond_style harmonic
angle_style harmonic
dihedral_style charmm
improper_style cvff

read_data Llen_all.data

# Groups
group oxy type 1
group hyd type 2
group water type 1 2
group solute type 3 4

group Csolute type 3
group Hsolute type 4

# FORCE-FIELD PARAMETERS
# O=1, H=2 charges
set group oxy charge -1.0484
set group hyd charge 0.5242
set group Csolute charge -0.115
set group Hsolute charge 0.115

# non-bonded interactions
pair_coeff 1 1 lj/cut/tip4p/long 0.16275 3.16435
pair_coeff 2 2 lj/cut/tip4p/long 0.00000 0.00000

##pair_coeff 3 3 lj/cut 0.07000 3.5500 # graphene
# J. Am. Chem. SOC. 1990, 112, 4168-4114
# J. Am. Chem. Soc. 1996, 118, 11225-11236
pair_coeff 3 3 lj/cut 0.07000 3.5500 # Benzene Carbon
pair_coeff 4 4 lj/cut 0.03000 2.4200 # Benzene Hydrogen

pair_coeff 1 2 lj/cut/tip4p/long 0.00000 0.00000
pair_coeff 1 3 lj/cut 0.107 3.35 # O-C
pair_coeff 1 4 lj/cut 0.07 2.767 # O-H

pair_coeff 2 3 lj/cut 0.046 2.93 # H-C
pair_coeff 2 4 lj/cut 0.03 2.4200 # H-H

pair_modify pair lj/cut mix geometric

# bonded interactions; need definition but tip4p/ew is a rigid model!
# bonded interactions; need definition but tip4p/ew is a rigid model!
# the columns are #, k [ energy/Dist^2 = kCal/mole/A^2], r0 [dist = A]
bond_coeff 1 450 0.9572  # TIP4P/ew water O-H
##bond_coeff 2 938 1.4000  # C-C bonds graphene Nature, 2001, 414, 188
bond_coeff 2 469 1.4000 # CA-CA bond
bond_coeff 3 367 1.0800 # CA-HA bond

# angle: #, k [ energy/rad^2 = kCal/mole/rad^2], theta0 [rad]
angle_coeff 1 55  104.52 # Tip4P/ew water H-O-H
##angle_coeff 2 126 120.00  # C-C-C angles graphene Nature, 2001, 414, 188
angle_coeff 2 63 120.00  # CA-CA-CA
angle_coeff 3 35 120.00  # CA-CA-HA

# dihedral: #, k [energy = kCal/mole], d (+1 or -1), n (integer >= 0)
##dihedral_coeff 1 harmonic 3.15 -1 2 # C-C-C-C graphene Nano Letters, 2009, 9, 3766
##dihedral_coeff 2 harmonic 3.15 1 2  # C-C-C-C graphene Nano Letters, 2009, 9, 3766
dihedral_coeff 1 3.625 2 180 0.0 # CA-CA-CA-CA

# improper: #, k [energy = kCal/mole/rad^2], X0
##improper_coeff 1 harmonic 15.0 0.0 # C-C-C-C graphene Soft Matter, 2014, 10, 4067
# improper: #, k [energy = kCal/mole], d (+1 or -1), n (integer >= 0)
improper_coeff 1 1.1 -1 2  # CA-CA-CA-HA for benzene from Bill

# SETTINGS
neighbor 2.0 bin
neigh_modify every 10 delay 0 check no

# OUTPUT
compute 1 water pe/atom pair kspace
compute 2 water reduce sum c_1
compute 5 all pe/atom pair kspace
compute 6 all reduce sum c_5

thermo          500
thermo_style    custom step time temp press pe ke etotal evdwl ecoul epair ebond eangle edihed vol density lx ly lz xlo xhi ylo yhi zlo zhi pxx pyy pzz pxy pxz pyz c_2 c_6
restart         5000 restart.sep.len.iter.benzene

# RUNS
min_style        sd
minimize         0.000001 0.0000001 5000 20000

dump            11 all xyz 500 traj_sep_len_iter.xyz
dump            1112 all custom 500 traj_sep_len_iter.velxyz id type vx vy vz
dump_modify     1112 sort id

fix 1 all momentum 10 linear 1 1 1 angular
fix 2 water nve/limit 0.1
fix 3 all langevin 298 298 100.0 1
fix 4 solute rigid/nve molecule
run 150000
unfix 2
unfix 3
unfix 4

fix 11 water shake 0.0001 20 1000 b 1 a 1
fix 12 water nvt temp 298 298 100
fix 13 solute rigid/nvt molecule temp 298 298 100
run 100000
unfix 11
unfix 12
unfix 13

fix 20 water shake 0.0001 20 1000 b 1 a 1
fix 21 water npt temp 298 298 100 iso 1 1 1000 dilate all
fix 22 solute rigid/nvt molecule temp 298 298 100
run 12500000
